E1 := 700
J2 := 2
R1 := 110
R5 := 280
E3 := 500
J3 := 6
R2 := 470
R6 := 150
E4 := 900
R3 := 640
R7 := 140
R4 := 120
R8 := 690
solve block
    # guess values
    I11 := 0
    I22 := 0
    I33 := 0
    I44 := 0
    I55 := 0
    # constraints
    I44 == J2
    I55 == J3
    I11*(R1 + R8 + R5 + R6) - I22*R8 - I33*R1 == E1
    I22*(R2 + R3 + R4 + R8) - I11*R8 - I33*R2 - I44*R2 - I55*R3 == E3 + E4
    I33*(R7 + R2 + R1) - I11*R1 - I22*R2 + I44*R2 == -E1
    # solver
    [I11; I22; I33; I44; I55] := find(I11, I22, I33, I44, I55) = [3.35382; 4.75107; 1.33601; 2; 6]
end solve block
I1 := I11 - I33 = 2.01782
I5 := I11 = 3.35382
I2 := I22 - I33 - I44 = 1.41507
I6 := I11 = 3.35382
I3 := I22 - I55 = -1.24893
I7 := -I33 = -1.33601
I4 := I22 = 4.75107
I8 := I11 - I22 = -1.39725
