E1 := 700
J2 := 2
R1 := 110
R5 := 280
E3 := 500
J3 := 6
R2 := 470
R6 := 150
E4 := 900
R3 := 640
R7 := 140
R4 := 120
R8 := 690
solve block
    # guess values
    U12 := 0
    U32 := 0
    U52 := 0
    U62 := 0
    # constraints
    U12*(1/R4 + 1/R3) - U32*1/R3 - U52*1/R4 == J3 + E3/R3 - E4/R4
    U32*(1/R3 + 1/R2 + 1/R7) - U12*1/R3 - U62*1/R7 == J2 - J3 - E3/R3
    U52*(1/R4 + 1/(R5 + R6) + 1/R8) - U12*1/R4 - U62*1/(R5 + R6) == E4/R4
    U62*(1/(R6 + R5) + 1/R1 + 1/R7) - U52*1/(R6 + R5) - U32*1/R7 == -E1/R1
    # solver
    [U12; U32; U52; U62] := find(U12, U32, U52, U62) = [634.232; -665.081; 964.103; -478.04]
end solve block
I1 := (U62 + E1)/R1 = 2.01782
I5 := (U52 - U62)/(R5 + R6) = 3.35382
I2 := -U32/R2 = 1.41507
I6 := I5 = 3.35382
I3 := (U32 - U12 + E3)/R3 = -1.24893
I7 := (U32 - U62)/R7 = -1.33601
I4 := (U12 - U52 + E4)/R4 = 4.75107
I8 := -U52/R8 = -1.39725
