R1 := 310
R5 := 280
J1 := 8
E3 := 400
R2 := 380
R6 := 840
J4 := 4
E4 := 300
R3 := 280
R7 := 370
E8 := 800
R4 := 260
R8 := 240
J8 := E8/R8 = 3.33333
E34 := E3 + E4 + J4*R4 = 1740
R18 := R1*R8/(R1 + R8 + R5 + R6) = 44.5509
R568 := (R5 + R6)*R8/(R1 + R8 + R5 + R6) = 160.958
R156 := R1*(R5 + R6)/(R1 + R8 + R5 + R6) = 207.904
E568 := J8*R568 = 536.527
E156 := J1*R156 = 1663.23
E18 := J1*R18 - J8*R18 = 207.904
I := E156/(R156 + R7) + (-E568 + E34)/(R568 + R3 + R4) - E18/(R18 + R2) = 4.10524
g66 := 1/(R156 + R7) + 1/(R568 + R3 + R4) + 1/(R18 + R2) = 0.00551244
U06 := I/g66 = 744.722
I2 := (E18 + U06)/(R2 + R18) = 2.24385
I3 := (E34 - E568 - U06)/(R4 + R3 + R568) = 0.654462
I7 := (E156 - U06)/(R156 + R7) = 1.58938
U13 := E568 + I3*R568 + I2*R18 - E18 = 533.929
U53 := -E156 + I7*R156 + I2*R18 - E18 = -1440.73
I8 := (E8 - U13)/R8 = 1.10863
I1 := U53/R1 = -4.64753
I4 := I3 - J4 = -3.34554
I5 := J4 + I4 + I8 = 1.76309
I6 := I5 = 1.76309
P1 := I1^2*R1 + I2^2*R2 + I3^2*R3 + I4^2*R4 + I5^2*R5 + I6^2*R6 + I7^2*R7 + I8^2*R8 = 16350.2
P2 := E3*I3 + E4*I4 + E8*I8 + J4*(-I4*R4 + E4) - J1*I1*R1 = 16350.2
U43 := -I5*R5 - I8*R8 + E8 = 40.2636
solve block
    # guess values
    I11 := 0
    I22 := 0
    # constraints
    I11*(R1 + R8 + R5 + R6) - I22*R1 == J1*R1 + E8
    -I11*R1 + I22*(R7 + R2 + R1) == -J1*R1
    # solver
    [I11; I22] := find(I11, I22) = [1.61759; -1.86656]
end solve block
Uxx := J4*R4 + E4 - E8 + I11*R8 + I22*R2 + E3 = 618.93
R56 := R5 + R6 = 1120
R17 := R1*R7/(R1 + R7 + R2) = 108.208
R12 := R1*R2/(R1 + R7 + R2) = 111.132
R27 := R2*R7/(R1 + R7 + R2) = 132.642
R128 := R12 + R8 = 351.132
R1567 := R17 + R56 = 1228.21
R125678 := R128*R1567/(R128 + R1567) = 273.065
R := R125678 + R4 + R27 = 665.707
I3 := Uxx/(R + R3) = 0.654462
f5 := 0
f3 := f5 - R1*I1 = 1440.73
f6 := f3 - I2*R2 = 588.072
f26 := f6 + E3 = 988.072
f2 := f26 - I3*R3 = 804.822
f12 := f2 - I4*R4 = 1674.66
f1 := f12 + E4 = 1974.66
f4 := f1 - I5*R5 = 1481
f5 := f4 - I6*R6 = 4.54747e-13
