R_1 := 910
R_5 := 390
J_02 := 1
E_8 := 200
R_2 := 290
R_6 := 170
J_06 := 1
R_3 := 640
E_2 := 100
R_7 := 650
R_4 := 910
E_1 := 300
R_8 := 920
solve block
    # guess values
    I_1 := 0
    I_5 := 0
    I_2 := 0
    I_6 := 0
    I_3 := 0
    I_7 := 0
    I_4 := 0
    I_8 := 0
    # constraints
    I_3 == I_4
    I_1*R_1 + I_8*R_8 + I_5*R_5 + I_6*R_6 == E_1 + E_8
    I_7 + I_6 + J_06 == I_1
    I_2*R_2 + I_3*R_3 + I_4*R_4 - I_8*R_8 == E_2 - E_8
    I_5 == J_06 + I_6
    -I_7*R_7 - I_2*R_2 - I_1*R_1 == -E_2 - E_1
    J_02 + I_2 == I_3 + I_7
    I_1 == I_8 + I_2 + J_02
    # solver
    [I_1; I_2; I_3; I_4; I_5; I_6; I_7; I_8] := find(I_1, I_2, I_3, I_4, I_5, I_6, I_7, I_8)
end solve block
I_1 = 0.474382
I_5 = 0.237575
I_2 = -0.640043
I_6 = -0.762425
I_3 = 0.12315
I_7 = 0.236807
I_4 = 0.12315
I_8 = 0.114424
