R_1 := 910
R_5 := 390
J_02 := 1
E_8 := 200
R_2 := 290
R_6 := 170
J_06 := 1
R_3 := 640
E_2 := 100
R_7 := 650
R_4 := 910
E_1 := 300
R_8 := 920
ϕ_5 := 0
solve block
    # guess values
    ϕ_2 := 0
    ϕ_3 := 0
    ϕ_4 := 0
    ϕ_6 := 0
    # constraints
    ϕ_2*(1/R_1 + 1/R_6 + 1/R_7) - ϕ_3*1/R_6 - ϕ_4*1/R_7 - ϕ_6*0 == J_06 - E_1/R_1
    -ϕ_2*1/R_6 + ϕ_3*(1/R_6 + 1/R_5) - ϕ_4*0 - ϕ_6*1/R_5 == -J_06
    -ϕ_2*1/R_7 - ϕ_3*0 + ϕ_4*(1/R_2 + 1/(R_3 + R_4) + 1/R_7) - ϕ_6*(1/(R_3 + R_4)) == J_02 + E_2/R_2
    -ϕ_2*0 - ϕ_3*1/R_5 - ϕ_4*(1/(R_3 + R_4)) + ϕ_6*(1/(R_4 + R_3) + 1/R_8 + 1/R_5) == E_8/R_8
    # solver
    [ϕ_2; ϕ_3; ϕ_4; ϕ_6] := find(ϕ_2, ϕ_3, ϕ_4, ϕ_6)
end solve block
ϕ_2 = 131.688
ϕ_3 = 2.07532
ϕ_4 = 285.612
ϕ_6 = 94.7295
I_1 := (ϕ_2 - ϕ_5 + E_1)/R_1 = 0.474382
I_4 := (ϕ_4 - ϕ_6)/(R_3 + R_4) = 0.12315
I_7 := (ϕ_4 - ϕ_2)/R_7 = 0.236807
I_2 := (ϕ_5 - ϕ_4 + E_2)/R_2 = -0.640043
I_5 := (ϕ_6 - ϕ_3)/R_5 = 0.237575
I_8 := (ϕ_5 - ϕ_6 + E_8)/R_8 = 0.114424
I_3 := (ϕ_4 - ϕ_6)/(R_3 + R_4) = 0.12315
I_6 := (ϕ_3 - ϕ_2)/R_6 = -0.762425
