R_1 := 910
R_5 := 390
J_02 := 1
E_8 := 200
R_2 := 290
R_6 := 170
J_06 := 1
R_3 := 640
E_2 := 100
R_7 := 650
R_4 := 910
E_1 := 300
R_8 := 920
E_22 := J_02*R_2 + E_2 = 390
E_06 := J_06*R_6 = 170
solve block
    # guess values
    I_11 := 0
    I_22 := 0
    # constraints
    I_11*(R_7 + R_3 + R_4 + R_5 + R_6) + I_22*(R_3 + R_4) == E_06
    I_11*(R_3 + R_4) + I_22*(R_2 + R_3 + R_4 + R_8) == E_22 - E_8
    # solver
    [I_11; I_22] := find(I_11, I_22)
end solve block
I_22 = 0.0500278
I_11 = 0.0334989
U_xx := I_11*R_7 + E_22 + E_1 - I_22*R_2 = 697.266
R_34 := R_3 + R_4 = 1550
R_56 := R_5 + R_6 = 560
R_28 := R_2*R_8/(R_2 + R_34 + R_8) = 96.6667
R_234 := R_34*R_2/(R_2 + R_34 + R_8) = 162.862
R_348 := R_34*R_8/(R_2 + R_34 + R_8) = 516.667
R_2347 := R_234 + R_7 = 812.862
R_34568 := R_348 + R_56 = 1076.67
R := R_2347*R_34568/(R_2347 + R_34568) + R_28 = 559.841
I_1 := U_xx/(R_1 + R) = 0.474382
