R_1 := 910
R_5 := 390
J_02 := 1
E_8 := 200
R_2 := 290
R_6 := 170
J_06 := 1
R_3 := 640
E_2 := 100
R_7 := 650
R_4 := 910
E_1 := 300
R_8 := 920
E_06 := J_06*R_6 = 170
R_56 := R_5 + R_6 = 560
E_02 := J_02*R_2 = 290
R_34 := R_3 + R_4 = 1550
E_22 := E_02 + E_2 = 390
J_1 := E_1/R_1 = 0.32967
J_22 := E_22/R_2 = 1.34483
R_12 := R_1*R_2/(R_1 + R_2 + R_7) = 142.649
R_17 := R_1*R_7/(R_1 + R_2 + R_7) = 319.73
R_27 := R_2*R_7/(R_1 + R_2 + R_7) = 101.892
E_17 := J_1*R_17 = 105.405
E_121 := J_1*R_12 = 47.027
E_27 := J_22*R_27 = 137.027
E_122 := J_22*R_12 = 191.838
E_12 := E_122 - E_121 = 144.811
E_167 := E_06 + E_17 = 275.405
E_128 := E_8 - E_12 = 55.1892
R_2347 := R_34 + R_27 = 1651.89
R_128 := R_12 + R_8 = 1062.65
R_1567 := R_17 + R_56 = 879.73
g_66 := 1/R_1567 + 1/R_128 + 1/R_2347 = 0.00268312
I_66 := E_128/R_128 + E_27/R_2347 - E_167/R_1567 = -0.17817
ϕ_6 := I_66/g_66 = -66.4038
I_1567 := (ϕ_6 + E_167)/R_1567 = 0.237575
I_128 := (E_128 - ϕ_6)/R_128 = 0.114424
I_2347 := (E_27 - ϕ_6)/R_2347 = 0.12315
I_8 := I_128 = 0.114424
I_34 := I_2347 = 0.12315
I_3 := I_34 = 0.12315
I_4 := I_34 = 0.12315
I_56 := I_1567 = 0.237575
I_5 := I_56 = 0.237575
I_6 := I_56 - J_06 = -0.762425
U_24 := -E_17 + I_56*R_17 + I_34*R_27 - E_27 = -153.925
U_25 := -E_17 + I_56*R_17 + I_8*R_12 + E_12 = 131.688
U_45 := E_27 - I_34*R_27 + I_8*R_12 + E_12 = 285.612
I_1 := (U_25 + E_1)/R_1 = 0.474382
I_2 := (-U_45 + E_2)/R_2 = -0.640043
I_7 := -U_24/R_7 = 0.236807
P1 := I_1^2*R_1 + I_2^2*R_2 + I_3^2*R_3 + I_4^2*R_4 + I_5^2*R_5 + I_6^2*R_6 + I_7^2*R_7 + I_8^2*R_8 = 516.42
P2 := E_1*I_1 + E_2*I_2 + E_8*I_8 - J_02*(I_2*R_2 - E_2) - J_06*I_6*R_6 = 516.42
U_35 := -I_5*R_5 + E_8 - I_8*R_8 = 2.07532
# Потенциальная | диаграмма
U_2 := 0
U_7 := U_2 - I_1*R_1 = -431.688
U_5 := U_7 + E_1 = -131.688
U_8 := U_5 - I_2*R_2 = 53.9247
U_4 := U_8 + E_2 = 153.925
U_1 := U_4 - I_3*R_3 = 75.1086
U_6 := U_1 - I_4*R_4 = -36.9581
U_3 := U_6 - I_5*R_5 = -129.612
U_2 := U_3 - I_6*R_6 = 0
