XL_1 := 55
XC_2 := 97
R_3 := 85
j := sqrt(-1)
XL_2 := 28
XC_4 := 31
R_5 := 75
XL_4 := 47
XC_5 := 83
R_7 := 73
XL_6 := 26
XC_7 := 29
R_8 := 12
E_4 := 60.6827240633 + j*23.2939262526
E_4 = 60.6827 + 23.2939i
Z_1 := j*XL_1 = 55i
Z_5 := R_5 - j*XC_5 = 75 - 83i
Z_2 := j*XL_2 - j*XC_2 = -69i
Z_6 := j*XL_6 = 26i
Z_3 := R_3 = 85
Z_7 := R_7 - j*XC_7 = 73 - 29i
Z_4 := j*XL_4 - j*XC_4 = 16i
Z_8 := R_8 = 12
Z_34 := Z_3 + Z_4 = 85 + 16i
Z_56 := Z_5 + Z_6 = 75 - 57i
solve block
    # guess values
    I_11 := 0
    I_22 := 0
    I_33 := 0
    # constraints
    I_11*(Z_1 + Z_7 + Z_56) - I_22*Z_7 - I_33*Z_1 == 0
    I_22*(Z_2 + Z_34 + Z_7) - I_11*Z_7 - I_33*Z_2 == E_4
    I_33*(Z_1 + Z_2 + Z_8) - I_11*Z_1 - I_22*Z_2 == 0
    # solver
    [I_11; I_22; I_33] := find(I_11, I_22, I_33) = [0.245303 + 0.237181i; 0.321096 + 0.205428i; 0.396617 - 0.259274i]
end solve block
I_1 := I_11 - I_33 = -0.151314 + 0.496455i
I_5 := I_11 = 0.245303 + 0.237181i
I_2 := I_22 - I_33 = -0.0755215 + 0.464702i
I_6 := I_11 = 0.245303 + 0.237181i
I_3 := I_22 = 0.321096 + 0.205428i
I_7 := I_11 - I_22 = -0.0757925 + 0.0317531i
I_4 := I_22 = 0.321096 + 0.205428i
I_8 := -I_33 = -0.396617 + 0.259274i
