XL_1 := 55
XC_2 := 97
R_3 := 85
j := sqrt(-1)
XL_2 := 28
XC_4 := 31
R_5 := 75
XL_4 := 47
XC_5 := 83
R_7 := 73
XL_6 := 26
XC_7 := 29
R_8 := 12
E_4 := 60.6827240633 + j*23.2939262526
E_4 = 60.6827 + 23.2939i
Z_1 := j*XL_1 = 55i
Z_5 := R_5 - j*XC_5 = 75 - 83i
Z_2 := j*XL_2 - j*XC_2 = -69i
Z_6 := j*XL_6 = 26i
Z_3 := R_3 = 85
Z_7 := R_7 - j*XC_7 = 73 - 29i
Z_4 := j*XL_4 - j*XC_4 = 16i
Z_8 := R_8 = 12
Z_34 := Z_3 + Z_4 = 85 + 16i
Z_56 := Z_5 + Z_6 = 75 - 57i
solve block
    # guess values
    U_14 := 0
    U_34 := 0
    U_54 := 0
    # constraints
    U_14*(1/Z_2 + 1/Z_34 + 1/Z_8) - U_34*1/Z_8 - U_54*1/Z_34 == -E_4/Z_34
    -U_14*1/Z_8 + U_34*(1/Z_1 + 1/Z_56 + 1/Z_8) - U_54*1/Z_56 == 0
    -U_14*1/Z_34 - U_34*1/Z_56 + U_54*(1/Z_34 + 1/Z_7 + 1/Z_56) == E_4/Z_34
    # solver
    [U_14; U_34; U_54] := find(U_14, U_34, U_54) = [-32.0644 - 5.21099i; -27.305 - 8.32227i; 4.61201 - 4.51596i]
end solve block
I_1 := U_34/Z_1 = -0.151314 + 0.496455i
I_5 := (U_54 - U_34)/Z_56 = 0.245303 + 0.237181i
I_2 := -U_14/Z_2 = -0.0755215 + 0.464702i
I_6 := I_5 = 0.245303 + 0.237181i
I_3 := (U_14 - U_54 + E_4)/Z_34 = 0.321096 + 0.205428i
I_7 := -U_54/Z_7 = -0.0757925 + 0.0317531i
I_4 := I_3 = 0.321096 + 0.205428i
I_8 := (U_14 - U_34)/Z_8 = -0.396617 + 0.259274i
