XL_1 := 55
XC_2 := 97
R_3 := 85
j := sqrt(-1)
XL_2 := 28
XC_4 := 31
R_5 := 75
XL_4 := 47
XC_5 := 83
R_7 := 73
XL_6 := 26
XC_7 := 29
R_8 := 12
E_4 := 60.6827240633 + j*23.2939262526
E_4 = 60.6827 + 23.2939i
Z_1 := j*XL_1 = 55i
Z_5 := R_5 - j*XC_5 = 75 - 83i
Z_2 := j*XL_2 - j*XC_2 = -69i
Z_6 := j*XL_6 = 26i
Z_3 := R_3 = 85
Z_7 := R_7 - j*XC_7 = 73 - 29i
Z_4 := j*XL_4 - j*XC_4 = 16i
Z_8 := R_8 = 12
Z_34 := Z_3 + Z_4 = 85 + 16i
Z_56 := Z_5 + Z_6 = 75 - 57i
solve block
    # guess values
    I_11 := 0
    I_22 := 0
    # constraints
    I_11*(Z_1 + Z_7 + Z_56) - I_22*Z_1 == 0
    I_22*(Z_1 + Z_2 + Z_8) - I_11*Z_1 == 0
    # solver
    [I_11; I_22] := find(I_11, I_22) = [0; 0]
end solve block
U_xx := -I_22*Z_2 + I_11*Z_7 + E_4 = 60.6827 + 23.2939i
Z_156 := Z_1*Z_56/(Z_1 + Z_56 + Z_7) = 14.6995 + 30.9506i
|U_xx| = 65
arg(U_xx)*180/π = 21
Z_17 := Z_1*Z_7/(Z_1 + Z_56 + Z_7) = 4.8806 + 28.1507i
Z_567 := Z_56*Z_7/(Z_1 + Z_56 + Z_7) = 33.3292 - 35.8297i
Z_1568 := Z_156 + Z_8 = 26.6995 + 30.9506i
Z_127 := Z_17 + Z_2 = 4.8806 - 40.8493i
Z_экв := Z_127*Z_1568/(Z_127 + Z_1568) + Z_567 + Z_3 = 167.032 - 50.3169i
I_4 := U_xx/(Z_экв + Z_4) = 0.321096 + 0.205428i
|Z_экв| = 174.446
arg(Z_экв)*180/π = -16.7645
