XL_1 := 55
XC_2 := 97
R_3 := 85
j := sqrt(-1)
XL_2 := 28
XC_4 := 31
R_5 := 75
XL_4 := 47
XC_5 := 83
R_7 := 73
XL_6 := 26
XC_7 := 29
R_8 := 12
E_4 := 60.6827240633 + j*23.2939262526
E_4 = 60.6827 + 23.2939i
Z_1 := j*XL_1 = 55i
Z_5 := R_5 - j*XC_5 = 75 - 83i
Z_2 := j*XL_2 - j*XC_2 = -69i
Z_6 := j*XL_6 = 26i
Z_3 := R_3 = 85
Z_7 := R_7 - j*XC_7 = 73 - 29i
Z_4 := j*XL_4 - j*XC_4 = 16i
Z_8 := R_8 = 12
Z_34 := Z_3 + Z_4 = 85 + 16i
Z_56 := Z_5 + Z_6 = 75 - 57i
Z_156 := Z_1*Z_56/(Z_1 + Z_56 + Z_7) = 14.6995 + 30.9506i
Z_17 := Z_1*Z_7/(Z_1 + Z_56 + Z_7) = 4.8806 + 28.1507i
Z_567 := Z_7*Z_56/(Z_1 + Z_56 + Z_7) = 33.3292 - 35.8297i
Z_1568 := Z_156 + Z_8 = 26.6995 + 30.9506i
Z_127 := Z_17 + Z_2 = 4.8806 - 40.8493i
Z_34567 := Z_567 + Z_34 = 118.329 - 19.8297i
Z_общ := Z_127*Z_1568/(Z_127 + Z_1568) + Z_34567 = 167.032 - 34.3169i
I := E_4/Z_общ = 0.321096 + 0.205428i
I_3 := I = 0.321096 + 0.205428i
I_4 := I = 0.321096 + 0.205428i
I_127 := I*Z_1568/(Z_1568 + Z_127) = -0.0755215 + 0.464702i
I_1568 := -I*Z_127/(Z_1568 + Z_127) = -0.396617 + 0.259274i
I_8 := I_1568 = -0.396617 + 0.259274i
I_2 := I_127 = -0.0755215 + 0.464702i
U_34 := -I_8*Z_8 - I_2*Z_2 = -27.305 - 8.32227i
I_1 := U_34/Z_1 = -0.151314 + 0.496455i
I_7 := I_1 - I_2 = -0.0757925 + 0.0317531i
I_5 := I_4 + I_7 = 0.245303 + 0.237181i
I_6 := I_5 = 0.245303 + 0.237181i
|I_1| = 0.519003
arg(I_1)*180/π = 106.951
|I_2| = 0.470799
arg(I_2)*180/π = 99.2308
|I_3| = 0.381186
arg(I_3)*180/π = 32.61
|I_4| = 0.381186
arg(I_4)*180/π = 32.61
|I_5| = 0.341216
arg(I_5)*180/π = 44.0356
|I_6| = 0.341216
arg(I_6)*180/π = 44.0356
|I_7| = 0.0821753
arg(I_7)*180/π = 157.269
|I_8| = 0.473844
arg(I_8)*180/π = 146.827
S := E_4*conj(I_4) = 24.2702 - 4.98635i
P_потр := |I_3|^2*R_3 + |I_5|^2*R_5 + |I_7|^2*R_7 + |I_8|^2*R_8 = 24.2702
Q_потр := |I_1|^2*XL_1 + |I_2|^2*(XL_2 - XC_2) + |I_4|^2*(XL_4 - XC_4) - |I_5|^2*XC_5 + |I_6|^2*XL_6 - |I_7|^2*XC_7 = -4.98635
|S| = 24.7771
arg(S)*180/π = -11.61
f4 := 0
f45 := f4 + I_7*R_7 = -5.53286 + 2.31798i
f5 := f45 - j*XC_7*I_7 = -4.61201 + 4.51596i
f65 := f5 + I_5*R_5 = 13.7857 + 22.3045i
f6 := f65 - j*XC_5*I_5 = 33.4717 + 1.9444i
f3 := f6 + j*XL_6*I_6 = 27.305 + 8.32227i
f4 := f3 + j*XL_1*I_1 = -2.13163e-14i
f4 := 0
f41 := f4 + j*XL_2*I_2 = -13.0117 - 2.1146i
f1 := f41 - j*XC_2*I_2 = 32.0644 + 5.21099i
f2 := f1 + I_3*R_3 = 59.3576 + 22.6724i
f52 := f2 + j*XL_4*I_4 = 49.7024 + 37.7639i
f522 := f52 - j*XC_4*I_4 = 56.0707 + 27.8099i
f5 := f522 - E_4 = -4.61201 + 4.51596i
f45 := f5 + j*XC_7*I_7 = -5.53286 + 2.31798i
f4 := f45 - I_7*R_7 = -3.55271e-15 + 5.77316e-15i
f4 := 0
f41 := f4 + j*XL_2*I_2 = -13.0117 - 2.1146i
f1 := f41 - j*XC_2*I_2 = 32.0644 + 5.21099i
f3 := f1 + I_8*R_8 = 27.305 + 8.32227i
f4 := f3 + j*XL_1*I_1 = 7.10543e-15 - 1.77636e-15i
