XL_1 := 16
XC_1 := 18
R_2 := 14
j := sqrt(-1)
XL_3 := 11
XC_5 := 17
R_4 := 16
XL_6 := 34
XC_7 := 74
R_5 := 58
XL_8 := 29
XC_8 := 95
R_7 := 58
E_6 := -31.0277147887 - j*55.975717119
Z_1 := j*XL_1 - j*XC_1 = -2i
Z_2 := R_2 = 14
Z_6 := j*XL_6 = 34i
Z_5 := R_5 - j*XC_5 = 58 - 17i
Z_34 := j*XL_3 + R_4 = 16 + 11i
Z_3 := j*XL_3 = 11i
Z_4 := R_4 = 16
Z_56 := R_5 - j*XC_5 + j*XL_6 = 58 + 17i
Z_7 := R_7 - j*XC_7 = 58 - 74i
Z_8 := j*XL_8 - j*XC_8 = -66i
solve block
    # guess values
    I_1 := 0
    I_5 := 0
    I_2 := 0
    I_6 := 0
    I_3 := 0
    I_7 := 0
    I_4 := 0
    I_8 := 0
    # constraints
    I_8 + I_6 == I_1
    I_6*Z_6 + I_1*Z_1 + I_7*Z_7 + I_5*Z_5 == E_6
    I_5 == I_6
    I_2*Z_2 + I_3*Z_3 + I_4*Z_4 - I_7*Z_7 == 0
    I_2 == I_8 + I_3
    -I_8*Z_8 - I_1*Z_1 - I_2*Z_2 == 0
    I_3 == I_4
    I_1 == I_2 + I_7
    # solver
    [I_1; I_2; I_3; I_4; I_5; I_6; I_7; I_8] := find(I_1, I_2, I_3, I_4, I_5, I_6, I_7, I_8)
end solve block
I_1 = -0.515641 - 0.446262i
I_5 = -0.479457 - 0.579309i
I_2 = -0.563471 - 0.244247i
I_6 = -0.479457 - 0.579309i
I_3 = -0.527287 - 0.377294i
I_7 = 0.0478303 - 0.202015i
I_4 = -0.527287 - 0.377294i
I_8 = -0.0361844 + 0.133047i
