XL_1 := 16
XC_1 := 18
R_2 := 14
j := sqrt(-1)
XL_3 := 11
XC_5 := 17
R_4 := 16
XL_6 := 34
XC_7 := 74
R_5 := 58
XL_8 := 29
XC_8 := 95
R_7 := 58
E_6 := -31.0277147887 - j*55.975717119
Z_1 := j*XL_1 - j*XC_1 = -2i
Z_2 := R_2 = 14
Z_6 := j*XL_6 = 34i
Z_5 := R_5 - j*XC_5 = 58 - 17i
Z_34 := j*XL_3 + R_4 = 16 + 11i
Z_3 := j*XL_3 = 11i
Z_4 := R_4 = 16
Z_56 := R_5 - j*XC_5 + j*XL_6 = 58 + 17i
Z_7 := R_7 - j*XC_7 = 58 - 74i
Z_8 := j*XL_8 - j*XC_8 = -66i
solve block
    # guess values
    I_11 := 0
    I_22 := 0
    I_33 := 0
    # constraints
    I_11*(Z_1 + Z_7 + Z_56) - I_22*Z_7 - I_33*Z_1 == E_6
    I_22*(Z_2 + Z_34 + Z_7) - I_11*Z_7 - I_33*Z_2 == 0
    I_33*(Z_1 + Z_2 + Z_8) - I_11*Z_1 - I_22*Z_2 == 0
    # solver
    [I_11; I_22; I_33] := find(I_11, I_22, I_33)
end solve block
I_11 = -0.479457 - 0.579309i
I_22 = -0.527287 - 0.377294i
I_33 = 0.0361844 - 0.133047i
I_1 := I_11 - I_33 = -0.515641 - 0.446262i
I_5 := I_11 = -0.479457 - 0.579309i
I_2 := I_22 - I_33 = -0.563471 - 0.244247i
I_6 := I_11 = -0.479457 - 0.579309i
I_3 := I_22 = -0.527287 - 0.377294i
I_7 := I_11 - I_22 = 0.0478303 - 0.202015i
I_4 := I_22 = -0.527287 - 0.377294i
I_8 := -I_33 = -0.0361844 + 0.133047i
