XL_1 := 16
XC_1 := 18
R_2 := 14
j := sqrt(-1)
XL_3 := 11
XC_5 := 17
R_4 := 16
XL_6 := 34
XC_7 := 74
R_5 := 58
XL_8 := 29
XC_8 := 95
R_7 := 58
E_6 := -31.0277147887 - j*55.975717119
Z_1 := j*XL_1 - j*XC_1 = -2i
Z_2 := R_2 = 14
Z_6 := j*XL_6 = 34i
Z_5 := R_5 - j*XC_5 = 58 - 17i
Z_34 := j*XL_3 + R_4 = 16 + 11i
Z_3 := j*XL_3 = 11i
Z_4 := R_4 = 16
Z_56 := R_5 - j*XC_5 + j*XL_6 = 58 + 17i
Z_7 := R_7 - j*XC_7 = 58 - 74i
Z_8 := j*XL_8 - j*XC_8 = -66i
solve block
    # guess values
    I_11 := 0
    I_22 := 0
    # constraints
    I_11*(Z_1 + Z_7 + Z_56) - I_22*Z_7 == E_6
    I_22*(Z_2 + Z_34 + Z_7) - I_11*Z_7 == 0
    # solver
    [I_11; I_22] := find(I_11, I_22)
end solve block
I_11 = -0.472243 - 0.560318i
I_22 = -0.530463 - 0.351951i
U_xx := I_22*Z_34 + I_11*Z_56 - E_6 = 8.54712 + 3.98283i
Z_234 := Z_2*Z_34/(Z_2 + Z_34 + Z_7) = 0.854606 + 2.36182i
Z_27 := Z_2*Z_7/(Z_2 + Z_34 + Z_7) = 11.6728 - 3.41603i
|U_xx| = 9.42953
arg(U_xx)*180/π = 24.9848
Z_347 := Z_7*Z_34/(Z_2 + Z_34 + Z_7) = 16.0244 + 5.26748i
Z_34567 := Z_347 + Z_56 = 74.0244 + 22.2675i
Z_127 := Z_1 + Z_27 = 11.6728 - 5.41603i
Z_экв := Z_127*Z_34567/(Z_127 + Z_34567) + Z_234 = 11.6056 - 1.39749i
I_8 := U_xx/(Z_экв + Z_8) = -0.0361844 + 0.133047i
|Z_экв| = 11.6894
arg(Z_экв)*180/π = -6.86627
