XL_1 := 16
XC_1 := 18
R_2 := 14
j := sqrt(-1)
XL_3 := 11
XC_5 := 17
R_4 := 16
XL_6 := 34
XC_7 := 74
R_5 := 58
XL_8 := 29
XC_8 := 95
R_7 := 58
E_6 := -31.0277147887 - j*55.975717119
E_6 = -31.0277 - 55.9757i
Z_1 := j*XL_1 - j*XC_1 = -2i
Z_2 := R_2 = 14
Z_6 := j*XL_6 = 34i
Z_5 := R_5 - j*XC_5 = 58 - 17i
Z_34 := j*XL_3 + R_4 = 16 + 11i
Z_3 := j*XL_3 = 11i
Z_4 := R_4 = 16
Z_56 := R_5 - j*XC_5 + j*XL_6 = 58 + 17i
Z_7 := R_7 - j*XC_7 = 58 - 74i
Z_8 := j*XL_8 - j*XC_8 = -66i
Z_27 := Z_2*Z_7/(Z_2 + Z_7 + Z_34) = 11.6728 - 3.41603i
Z_234 := Z_2*Z_34/(Z_2 + Z_7 + Z_34) = 0.854606 + 2.36182i
Z_347 := Z_34*Z_7/(Z_2 + Z_7 + Z_34) = 16.0244 + 5.26748i
Z_2348 := Z_8 + Z_234 = 0.854606 - 63.6382i
Z_127 := Z_1 + Z_27 = 11.6728 - 5.41603i
Z_34567 := Z_347 + Z_56 = 74.0244 + 22.2675i
Z_экв := Z_2348*Z_127/(Z_2348 + Z_127) + Z_34567 = 83.6526 + 15.674i
I := E_6/Z_экв = -0.479457 - 0.579309i
I_5 := I = -0.479457 - 0.579309i
I_127 := I*Z_2348/(Z_127 + Z_2348) = -0.515641 - 0.446262i
I_6 := I = -0.479457 - 0.579309i
I_2348 := I*Z_127/(Z_127 + Z_2348) = 0.0361844 - 0.133047i
I_8 := -I_2348 = -0.0361844 + 0.133047i
|I_8| = 0.13788
I_1 := I_127 = -0.515641 - 0.446262i
U_53 := -I_8*Z_8 - I_1*Z_1 = -7.8886 - 3.41945i
I_2 := U_53/Z_2 = -0.563471 - 0.244247i
I_7 := I_1 - I_2 = 0.0478303 - 0.202015i
I_3 := I_2 - I_8 = -0.527287 - 0.377294i
I_4 := I_3 = -0.527287 - 0.377294i
S := E_6*conj(I_6) = 47.3037 + 8.8633i
P_потр := |I_2|^2*R_2 + |I_4|^2*R_4 + |I_5|^2*R_5 + |I_7|^2*R_7 = 47.3037
Q_потр := |I_1|^2*(XL_1 - XC_1) + |I_3|^2*XL_3 - |I_5|^2*XC_5 + |I_6|^2*XL_6 - |I_7|^2*XC_7 + |I_8|^2*(XL_8 - XC_8) = 8.8633
I_8 + I_6 = -0.515641 - 0.446262i
I_1 = -0.515641 - 0.446262i
S_потр := P_потр + j*Q_потр = 47.3037 + 8.8633i
I_7 + I_2 = -0.515641 - 0.446262i
I_1 = -0.515641 - 0.446262i
|S| = 48.1269
I_8 + I_3 = -0.563471 - 0.244247i
I_2 = -0.563471 - 0.244247i
arg(S)*180/π = 10.6125
I_7 + I_4 = -0.479457 - 0.579309i
I_5 = -0.479457 - 0.579309i
|I_1| = 0.681935
arg(I_1)*180/π = -139.125
|I_2| = 0.614131
arg(I_2)*180/π = -156.565
|I_3| = 0.648369
arg(I_3)*180/π = -144.415
|I_4| = 0.648369
arg(I_4)*180/π = -144.415
|I_5| = 0.751982
arg(I_5)*180/π = -129.612
|I_6| = 0.751982
arg(I_6)*180/π = -129.612
|I_7| = 0.2076
arg(I_7)*180/π = -76.6796
|I_8| = 0.13788
arg(I_8)*180/π = 105.215
f5 := 0
f3 := f5 + I_2*R_2 = -7.8886 - 3.41945i
f4 := f3 + j*XL_3*I_3 = -3.73837 - 9.21961i
f6 := f4 + I_4*R_4 = -12.175 - 15.2563i
f56 := f6 + j*XC_7*I_7 = 2.77416 - 11.7169i
f5 := f56 - I_7*R_7 = -7.99361e-15 - 1.24345e-14i
f5 := 0
f56 := f5 + I_7*R_7 = 2.77416 - 11.7169i
f6 := f56 - j*XC_7*I_7 = -12.175 - 15.2563i
f26 := f6 + I_5*R_5 = -39.9834 - 48.8562i
f2 := f26 - j*XC_5*I_5 = -49.8317 - 40.7055i
f12 := f2 + j*XL_6*I_6 = -30.1352 - 57.007i
f1 := f12 - E_6 = 0.892523 - 1.03128i
f15 := f1 - j*XC_1*I_1 = -7.14019 + 8.25026i
f5 := f15 + j*XL_1*I_1 = 8.88178e-16 + 1.42109e-14i
f5 := 0
f3 := f5 + I_2*R_2 = -7.8886 - 3.41945i
f13 := f3 + j*XL_8*I_8 = -11.747 - 4.4688i
f1 := f13 - j*XC_8*I_8 = 0.892523 - 1.03128i
f15 := f1 - j*XC_1*I_1 = -7.14019 + 8.25026i
f5 := f15 + j*XL_1*I_1 = 8.88178e-16
