L := 29.06*10^-3
U := 9
R_3 := 124.9
f := 900
R_1 := 124.7
r_k := 46.7
C := 0.936*10^-6
R_2 := 124.9
j := sqrt(-1)
X_c := 1/(2*π*f*C) = 188.93
|X_c| = 188.93
X_L := 2*π*f*L = 164.33
|X_L| = 164.33
Z := R_1 + r_k + j*(2*π*f*L - 1/(2*π*f*C)) = 171.4 - 24.5999i
|Z| = 173.156
I := U/Z = 0.051449 + 0.00738414i
|I|*10^3 = 51.9762
U_k := I*(r_k + j*X_L) = 1.18923 + 8.79947i
|U_k| = 8.87946
U_c := I*(-j*X_c) = 1.39509 - 9.72027i
|U_c| = 9.81987
U_1 := I*R_1 = 6.41568 + 0.920802i
|U_1| = 6.48143
arg(Z)*180/π = -8.16752
arg(U_k)*180/π = 82.3032
arg(I)*180/π = 8.16752
arg(U_c)*180/π = -81.8325
arg(U_1)*180/π = 8.16752
L := 29.06*10^-3
U := 9
R_3 := 124.9
X_c := 1/(2*π*f*C) = 188.93
f := 900
R_1 := 124.7
r_k := 46.7
C := 0.936*10^-6
R_2 := 124.9
j := sqrt(-1)
X_L := 2*π*f*L = 164.33
I_1 := U/R_1 = 0.0721732
|I_1|*10^3 = 72.1732
arg(I_1)*180/π = 0
I_2 := U/(-j*X_c) = 0.0476366i
|I_2|*10^3 = 47.6366
arg(I_2)*180/π = 90
I_3 := U/(j*X_L + r_k) = 0.014401 - 0.0506752i
|I_3|*10^3 = 52.6817
arg(I_3)*180/π = -74.1357
I := I_1 + I_2 + I_3 = 0.0865743 - 0.00303856i
|I|*10^3 = 86.6276
arg(I)*180/π = -2.01013
L := 29.06*10^-3
U := 9
R_3 := 124.9
X_c := 1/(2*π*f*C) = 188.93
f := 900
R_1 := 124.7
r_k := 46.7
C := 0.936*10^-6
R_2 := 124.9
j := sqrt(-1)
X_L := 2*π*f*L = 164.33
Z := R_1 + R_2*(R_3 + r_k + j*X_L)/(R_2 + R_3 + r_k + j*X_L) = 209.35 + 22.3079i
|Z| = 210.535
I_1 := U/Z = 0.0425076 - 0.00452953i
|I_1|*10^3 = 42.7482
I_2 := I_1*(R_3 + r_k + j*X_L)/(R_2 + R_3 + r_k + j*X_L) = 0.0296182 + 0.00452227i
|I_2|*10^3 = 29.9614
I_3 := I_1 - I_2 = 0.0128894 - 0.0090518i
|I_3|*10^3 = 15.7503
U_1 := I_1*R_1 = 5.30069 - 0.564832i
|U_1| = 5.3307
U_2 := I_2*R_2 = 3.69931 + 0.564832i
|U_2| = 3.74218
U_3 := I_3*R_3 = 1.60989 - 1.13057i
|U_3| = 1.96721
U_k := I_3*(r_k + j*X_L) = 2.08942 + 1.6954i
|U_k| = 2.69074
arg(I_1)*180/π = -6.08238
arg(U_k)*180/π = 39.0566
arg(U_2)*180/π = 8.68121
arg(I_2)*180/π = 8.68121
arg(Z)*180/π = 6.08238
arg(U_3)*180/π = -35.0791
arg(U_1)*180/π = -6.08238
arg(I_3)*180/π = -35.0791
I := I_1 + I_2 + I_3 = 0.0850151 - 0.00905905i
|I|*10^3 = 85.4964
P_потр := |I_1|^2*R_1 + |I_2|^2*R_2 + |I_3|^2*(R_3 + r_k) = 0.382568
arg(I)*180/π = -6.08238
Q_потр := |I_3|^2*X_L = 0.0407657
cosφ := P_потр/sqrt(P_потр^2 + Q_потр^2) = 0.994371
S_ист := U*I_1 = 0.382568 - 0.0407657i
cosϕ := P_потр/S_ист = 0.988773 + 0.105362i
|S_ист| = 0.384734
arg(S_ист)*180/π = -6.08238
|cosϕ| = 0.994371
