E1 := 700
J2 := 2
R1 := 110
R5 := 280
E3 := 500
J3 := 6
R2 := 470
R6 := 150
E4 := 900
R3 := 640
R7 := 140
R4 := 120
R8 := 690
solve block
    # guess values
    I1 := 0
    I5 := 0
    I2 := 0
    I6 := 0
    I3 := 0
    I7 := 0
    I4 := 0
    I8 := 0
    # constraints
    I3 + J3 == I4
    I8 + I4 == I5
    I1 == I2 + J2 + I8
    I1*R1 + I8*R8 + I5*R5 + I6*R6 == E1
    I2 + J2 == I3 + J3 + I7
    I2*R2 + I3*R3 + I4*R4 - I8*R8 == E3 + E4
    I5 == I6
    -I1*R1 - I2*R2 - I7*R7 == -E1
    # solver
    [I1; I2; I3; I4; I5; I6; I7; I8] := find(I1, I2, I3, I4, I5, I6, I7, I8) = [2.01782; 1.41507; -1.24893; 4.75107; 3.35382; 3.35382; -1.33601; -1.39725]
end solve block
