R_1 := 910
R_5 := 390
J_02 := 1
E_8 := 200
R_2 := 290
R_6 := 170
J_06 := 1
R_3 := 640
E_2 := 100
R_7 := 650
R_4 := 910
E_1 := 300
R_8 := 920
solve block
    # guess values
    I_11 := 0
    I_22 := 0
    I_33 := 0
    I_44 := 0
    I_55 := 0
    # constraints
    I_44 == J_06
    I_55 == J_02
    I_11*(R_1 + R_8 + R_5 + R_6) - I_22*R_8 - I_33*R_1 - I_44*R_6 == E_1 + E_8
    I_22*(R_2 + R_3 + R_4 + R_8) - I_11*R_8 - I_33*R_2 - I_55*R_2 == E_2 - E_8
    I_33*(R_1 + R_7 + R_2) - I_11*R_1 - I_22*R_2 + I_55*R_2 == -E_2 - E_1
    # solver
    [I_11; I_22; I_33; I_44; I_55] := find(I_11, I_22, I_33, I_44, I_55)
end solve block
I_11 = 0.237575
I_22 = 0.12315
I_33 = -0.236807
I_1 := I_11 - I_33 = 0.474382
I_5 := I_11 = 0.237575
I_2 := I_22 - I_33 - I_55 = -0.640043
I_6 := I_11 - I_44 = -0.762425
I_3 := I_22 = 0.12315
I_7 := -I_33 = 0.236807
I_4 := I_22 = 0.12315
I_8 := I_11 - I_22 = 0.114424
