XL_1 := 16
XC_1 := 18
R_2 := 14
j := sqrt(-1)
XL_3 := 11
XC_5 := 17
R_4 := 16
XL_6 := 34
XC_7 := 74
R_5 := 58
XL_8 := 29
XC_8 := 95
R_7 := 58
E_6 := -31.0277147887 - j*55.975717119
Z_1 := j*XL_1 - j*XC_1 = -2i
Z_2 := R_2 = 14
Z_6 := j*XL_6 = 34i
Z_5 := R_5 - j*XC_5 = 58 - 17i
Z_34 := j*XL_3 + R_4 = 16 + 11i
Z_3 := j*XL_3 = 11i
Z_4 := R_4 = 16
Z_56 := R_5 - j*XC_5 + j*XL_6 = 58 + 17i
Z_7 := R_7 - j*XC_7 = 58 - 74i
Z_8 := j*XL_8 - j*XC_8 = -66i
solve block
    # guess values
    U_15 := 0
    U_35 := 0
    U_65 := 0
    # constraints
    U_15*(1/Z_1 + 1/Z_8 + 1/Z_56) - U_35*1/Z_8 - U_65*1/Z_56 == E_6/Z_56
    -U_15*1/Z_8 + U_35*(1/Z_8 + 1/Z_2 + 1/Z_34) - U_65*1/Z_34 == 0
    -U_15*1/Z_56 - U_35*1/Z_34 + U_65*(1/Z_34 + 1/Z_7 + 1/Z_56) == -E_6/Z_56
    # solver
    [U_15; U_35; U_65] := find(U_15, U_35, U_65)
end solve block
U_15 = -0.892523 + 1.03128i
U_35 = 7.8886 + 3.41945i
U_65 = 12.175 + 15.2563i
I_1 := U_15/Z_1 = -0.515641 - 0.446262i
I_5 := (U_65 - U_15 + E_6)/Z_56 = -0.479457 - 0.579309i
I_2 := -U_35/Z_2 = -0.563471 - 0.244247i
I_6 := I_5 = -0.479457 - 0.579309i
I_3 := (U_35 - U_65)/Z_34 = -0.527287 - 0.377294i
I_7 := -U_65/Z_7 = 0.0478303 - 0.202015i
I_4 := I_3 = -0.527287 - 0.377294i
I_8 := (U_35 - U_15)/Z_8 = -0.0361844 + 0.133047i
